# AguaClara Water Treatment Plants
# Design References
# MathCAD dimension calculations:
# Variable Naming Guide
# The list below is the list names that can be used before the period for the subscript in our variable names.
# Major Plant Components. These items follow the period in the variable name
Q_Plant := □  # error: This placeholder is empty.  # define flow rate here
# [reference: BasicInputs.xmcd]
# [reference: ExpertInputs.xmcd]
# [reference: MathFunctions.xmcd]
# [reference: PipeDatabase.xmcd]
[
    "Subscripts", "";
    "component key", "Description";
    "Et", "Entrance tank";
    "Lfom", "Linear flow orifice meter";
    "Rm", "Rapid mix";
    "Floc", "Flocculation tank";
    "Sed", "Sedimentation tank";
    "Fi", "Stacked Rapid Sand Filter"
]
# [reference: FluidsFunctions.xmcd]
N_SedBaysEst :=
    2 if Q_Plant ≥ Q_PipeED(ED_SedInlet, 6 in, Pi_VenaContractaOrifice, Pi_Jet)*4
    1 otherwise
N_SedBaysEst = 2  # After 4 bays then go to 2 bays per sed tank
N_SedTanks :=
    ceil(Q_Plant/(N_SedBaysEst*Q_PipeED(ED_SedInlet, 6 in, Pi_VenaContractaOrifice, Pi_Jet))) if Q_Plant ≤ Q_PipeED(ED_SedInlet, 6 in, Pi_VenaContractaOrifice, Pi_Jet)*10
    ceil(Q_Plant/(N_SedBaysEst*Q_PipeED(ED_SedInlet, 8 in, Pi_VenaContractaOrifice, Pi_Jet))) otherwise  # after 10 bays with 6" pipes switch to 8" pipes
N_SedTanks = 3
# [reference: SedimentationTank.xmcd]
# [reference: Flocculator.xmcd]
# [reference: LFOM.xmcd]
# [reference: EntranceTank.xmcd]
# [reference: StackedRapidSandFilter.xmcd]
# [reference: LinearCdc.xmcd]
# [reference: ChemStorageTanks.xmcd]
# [reference: MaterialsList.xmcd]
# AutoCAD drawing programs:
[
    "Symbol", "Description", "Dimensions";
    "Amp", "amplitude", "L";
    "B", "perpendicular distance between components (center to center)", "L";
    "D", "Diameter", "L";
    "E", "pipe roughness", "L";
    "FB", "Freeboard", "L";
    "H", "height (includes freeboard)", "L";
    "HL", "head loss", "L";
    "HW", "local water depth", "L";
    "ID", "inner diameter", "L";
    "L", "length", "L";
    "Loc", "Locations", "L";
    "ND", "nominal diameter", "L";
    "OD", "outer diameter", "L";
    "R", "Radius", "L";
    "S", "space between components", "L";
    "T", "thickness", "L";
    "W", "width", "L";
    "Z", "elevation relative to bottom of sed tank", "L";
    "ZW", "water depth relative to bottom of sed tank", "L";
    "V", "velocity", "L/T";
    "CP", "Collision Potential", "L^(2/3)";
    "A", "Area", "L^2";
    "Nu", "kinematic viscosity", "L^2/T";
    "ED", "energy dissipation rate", "L^2/T^3";
    "Vol", "volume", "L^3";
    "Q", "flow", "L^3/T";
    "MW", "Molecular weight", "M";
    "C", "Concentration", "M/L^3";
    "Rho", "Density", "M/L^3";
    "AN", "angle", "radians";
    "Ti", "time", "T";
    "EN", "Enumerated type", "dimensionless";
    "N", "Number", "dimensionless";
    "Pi", "dimensionless geometric ratio", "";
    "AC", "AutoCAD command string", "";
    "K", "minor loss coefficient", ""
]
# Translators:
# These are the codes that take MathCAD outputs and create AutoCAD scripts that are used to draw the plant (formerly Basics)
# [reference: MtoATranslators.xmcd]
# The wrapped MtoA translator contains the functions that the user will want to access. These functions will draw pieces with full functionality - specifying the location, dimension, and orientation of the object. Also, it contains layer control and subtraction capabilities for grouped objects.
# [reference: MtoATranslatorsWrapped.xmcd]
# Plant Elements:
# These are all of the files that draw the fundamental parts of the plants (tees, elbows, tanks, pipes, etc)
# [reference: ChannelF.xmcd]
# [reference: PlumbingF.xmcd]
# [reference: TankF.xmcd]
# [reference: StairsF.xmcd]
# [reference: DrainChannelF.xmcd]
# Specific Pieces:
# These are the codes that draw the bigger pieces of the plant (the sed tank, floc tank, etc)
# [reference: FlocculatorAC.xmcd]
# [reference: SedimentationTankAC.xmcd]
# [reference: EntranceTankAC.xmcd]
# [reference: ChemStockTanksAC.xmcd]
# [reference: StackedRapidSandFilterAC.xmcd]
# [reference: CdcAC.xmcd]
# [reference: OperatorAccessAC.xmcd]
# AutoCAD Materials:
# Adds the option of assigning materials to the entire plant design.
# [reference: MaterialsAC.xmcd]
# Layouts:
# [reference: LayoutsAC.xmcd]
# Entrance Tank
L_Et = 5.44972 m
H_EtHopper = 0.908985 m
W_Et = 0.95485 m
L_EtHopper = 2.01957 m
H_Et = 1.20898 m
ND_EtOverflowDrain = 8 in
L_EtDrainStopper = 1.20498 m
L_EtOverflowWeir = 2.18624 m
W_EtOverflowSlot = 0.120716 m
ND_EtFlowControl = 6 in
H_EtOverflowCutaway = 0.0201193 m
ND_EtDrain = 3 in
B_EtRebar = 0.0431717 m
# Chem Tanks
Vol_CoagTank = 600 L
C_CoagStock = 384 kg/m^3
Vol_ChlorineTank = 208.198 L
C_ChlorStock = 40 kg/m^3
# Sedimentation
# Sed Tanks and Slopes:
N_SedTanks = 3
L_Sed = 6.31005 m
N_SedBays = 2  # Number of bays of inlet manifolds in each sed tank
# Length of the port through which water exits the inlet manifold
# Width of ferrous cement plates in whice one manifold port is cut
Q_SedBay = 5.33333 L/s
# Sedimentation Tank Sludge Drain:
N_SedSludgeOrifices = 48  # per cell
Ti_SludgeDrain = 30 min  # Tank Drain time
W_SedSludge = 9.14742 cm  # Width of the sludge channel
B_SedSludgeOrifices = 10.4031 cm  # Distance center to center between drain orifices
# Depth of the sludge channel
H_SedSludge = 9.14742 cm
W_SedDrainCover = 13.1474 cm
D_SedSludgeOrifice = 0.00931902 m  # Diameter of drain orifices
N_SedSludgeOrifices = 48
# Sedimentation Tank Dimensions:
Z_SedSludge = 0.0914742 m  # Height from 0 of the top of the sludge drain
# Height from 0 of the top of the inlet manifold
W_Sed = 2.1336 m
L_Sed = 6.31005 m  # Total tank length
# Inlet Channel:
HW_SedInletChannel = 0.389101 m  # Width of the drop chimneys connecting channel to sed inlet manifolds
W_SedInletChannel = 0.579538 m  # length of drop chimmneys
L_SedChannel = 6.7008 m
H_SedInletChannel = 0.489101 m
# Sedimentation Tank Effluent Launder:
N_SedLaunderOrifices = 49  # Number of orifices per launder  # More Launder Dimensions
ND_SedLaunder = 6 in
Q_SedLaunderOrifices = 0.000108844 m^3/s
# Center to center launder spacing
L_SedLaunder = 5.08878 m
B_SedLaunderOrifices = 0.1 m
D_SedLaunderOrifice = 0.625 in
# Exit Channel:
W_SedExitChannel = 0.435037 m
H_SedExitChannel = 0.489101 m
HW_SedExitChannel = 0.349101 m  # water height in exit channel from 0
# Lamella:
L_SedPlate = 0.6 m  # center to center distance between lamella
B_SedPlate = 2.7 cm  # spacing between lamella
S_SedPlate = 2.5 cm
N_SedPlates = 160  # Number of Sed Plates per Sedimentation Tank Bay.
AN_SedPlate = 60 deg
L_SedActive = 4.986 m
V_SedUp = 86.2948 m/day
Z_SedLaunder = 1.69733 m
N_SedPlates = 160
HW_Sed = 1.84835 m
H_Sed = 1.94835 m
# Flocculator
# create a string that tells you whether the flocculator is horizontal or vertical:
EN_FlocType :=
    "horizontal" if EN_FlocHoriz == 1
    "vertical" otherwise
# Look at Flocculator Positioning arrays
W_FlocChannel = 0.54 m
# Fill last channel with bafffles from last channel
ED_Floc = 10.5 mW/kg
# Fix port width to be based on energy dissipation in that channel
# Adjust spacing after the number of baffles per channel is known.
HW_FlocEnd = 1.84835 m
# Check the residence time of the flocculator should be at least 20minutes
X_FlocBaffles = [
    0.524004, 0.524004, 0.524004, 1.05001;
    1.05001, 1.05001, 1.05001, 1.57601;
    1.57601, 1.57601, 1.57601, 2.10202;
    2.10202, 2.10202, 2.10202, 2.62802;
    2.62802, 2.62802, 2.62802, 3.15402;
    3.15402, 3.15402, 3.15402, 3.68003;
    3.68003, 3.68003, 3.68003, 4.20603;
    4.20603, 4.20603, 4.20603, 4.73204;
    4.73204, 4.73204, 4.73204, 5.25804;
    5.25804, 5.25804, 5.25804, 5.78404;
    5.78404, 5.78404, 5.78404, 0
] m
L_FlocBaffles = [
    1.06235, 1.06235, 1.06235, 1.18896;
    1.18896, 1.18896, 1.18896, 1.06235;
    1.06235, 1.06235, 1.06235, 1.18896;
    1.18896, 1.18896, 1.18896, 1.06235;
    1.06235, 1.06235, 1.06235, 1.18896;
    1.18896, 1.18896, 1.18896, 1.06235;
    1.06235, 1.06235, 1.06235, 1.18896;
    1.18896, 1.18896, 1.18896, 1.06235;
    1.06235, 1.06235, 1.06235, 1.18896;
    1.18896, 1.18896, 1.18896, 1.06235;
    1.06235, 1.06235, 1.06235, 0
] m
Z_FlocBaffles = [
    0, 0, 0, 0.786006;
    0.786006, 0.786006, 0.786006, 0;
    0, 0, 0, 0.786006;
    0.786006, 0.786006, 0.786006, 0;
    0, 0, 0, 0.786006;
    0.786006, 0.786006, 0.786006, 0;
    0, 0, 0, 0.786006;
    0.786006, 0.786006, 0.786006, 0;
    0, 0, 0, 0.786006;
    0.786006, 0.786006, 0.786006, 0;
    0, 0, 0, 0
] m
N_FlocChannels = 4
HL_Floc = 7.66179 cm
HW_FlocStart = 1.92497 m
S_FlocBaffle = [52.4004; 52.4004; 52.4004; 52.4004] cm
B_FlocBaffle = [52.6004; 52.6004; 52.6004; 52.6004] cm
N_FlocChannelBaffles = [11; 11; 11; 10]
W_FlocPort = [0.504004; 0.504004; 0.504004; 0.389538] m
L_FlocBaffleLower = 1.06235 m
L_FlocBaffleUpper = 1.18896 m
H_FlocPort = [0.842143; 0.842143; 0.842143; 0.842143] m
# Materials List
N_Valves = 6
N_ValveCouplings = 6
N_SedPlatesTotal = 960
N_SedPlatesPerSheet = 5
N_SedPlateSheets = 192
# AutoCAD Scripts
AC_SedTank =  # no stored result
AC_EntranceTank =  # no stored result
AC_FlocTank =  # no stored result
AC_Filter =  # no stored result
AC_ChemTanks =  # no stored result
AC_OperatorAccess = [
    "-layer m OpWalkwayCon"; "c t 132,132,132"; "OpWalkwayCon"; "  "; "_-view o f"; "_pline"; "-10.1947,2.78264"; "-9.8947,2.78264"; "-9.8947,2.59358"; "-9.5947,2.59358"
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]
AC_ZLayout := AC_Layout
AC_Cdc = [
    "-layer m Cdc";
    "c t 125,0,160";
    "Cdc";
    "  ";
    "-insert https://confluence.cornell.edu/download/attachments/173604905/CdcLeverArm.dwg";
    "-6.0394,10.92907,2.49484 x 1 1  270";
    "-insert https://confluence.cornell.edu/download/attachments/173604905/CdcLeverArmBracket.dwg";
    "-6.45215,10.89707,2.46994 x 1 1  270";
    "-insert https://confluence.cornell.edu/download/attachments/173604905/CdcCht.dwg";
    "-7.3855,10.92907,2.58764 x 1 1  90"
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]
AC_ZLayout = ["laythw -view _SEISO "]
AC_MatApply = ["-insert https://confluence.cornell.edu/download/attachments/173604905/CdcLeverArm.dwg"; "0,0,0 x 1 1  0"]
